*Heading
** Job name: Job-1 Model name: standard
** Generated by: Abaqus/CAE 6.13-1
*Preprint, echo=NO, model=NO, history=NO, contact=NO
**
** PARTS
**
*Part, name=Frame
*Node
      1,      1.51352,   0.71351999
      2,   1.28240001,   0.71351999
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*Element, type=CPS3
1, 351, 344, 408
2, 404, 358, 282
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*Element, type=CPS4R
  7,  29,  30, 189, 390
  8, 189, 325, 320, 390
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*Nset, nset=polygon, generate
   1,  188,    1
*Elset, elset=polygon
   7,   9,  10,  11,  12,  13
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*Nset, nset=Set-3, generate
   1,  622,    1
*Elset, elset=Set-3, generate
   1,  532,    1
** Region: (Section-3:Set-3)
*Elset, elset=_I1, internal
   1,   2,   3,   4,   5,   6
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** Section: Section-3
*Solid Section, elset=_I1, material=Steel
1.,
** Region: (Section-3:Set-3), (Beam Orientation:polygon)
*Elset, elset=_I2, internal
   7,   9,  10,  11,  12,  13
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** Section: Section-3
*Solid Section, elset=_I2, material=Steel
1.,
*End Part
**
*Part, name=plane
*Node
      1,      3.02704,  -0.71351999
      2,   2.99706936,  -0.71351999
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*Element, type=B21
  1,   1,   2
  2,   2,   3
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*Nset, nset=Set-2, generate
   1,  203,    1
*Elset, elset=Set-2, generate
   1,  202,    1
** Section: plane  Profile: Profile-1
*Beam Section, elset=Set-2, material=Rigidbody, temperature=GRADIENTS, section=BOX
1., 1., 0.25, 0.25, 0.25, 0.25
0.,0.,-1.
*End Part
**
*Part, name=planetop
*Node
      1,      3.02704,  0.754871964
      2,   2.99706936,  0.754871964
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*Element, type=B21
  1,   1,   2
  2,   2,   3
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*Nset, nset=Set-2, generate
   1,  203,    1
*Elset, elset=Set-2, generate
   1,  202,    1
** Section: plane  Profile: Profile-1
*Beam Section, elset=Set-2, material=Rigidbody, temperature=GRADIENTS, section=BOX
1., 1., 0.25, 0.25, 0.25, 0.25
0.,0.,-1.
*End Part
**
**
** ASSEMBLY
**
*Assembly, name=Assembly
**
*Instance, name=Frame-1, part=Frame
*End Instance
**
*Instance, name=plane-1, part=plane
*End Instance
**
*Instance, name=planetop-1, part=planetop
*End Instance
**
*Nset, nset=Set-5, instance=plane-1, generate
   1,  203,    1
*Elset, elset=Set-5, instance=plane-1, generate
   1,  202,    1
*Nset, nset=Set-6, instance=Frame-1
 23,
*Nset, nset=Set-7, instance=Frame-1
 6,
*Nset, nset=Set-8, instance=Frame-1
   6,   7,  22,  23,  69,  70,  71,  72, 141, 142, 143, 144
*Elset, elset=Set-8, instance=Frame-1
  15,  50,  59, 139, 140, 288, 313, 316, 319, 397
*Nset, nset=Set-9, instance=Frame-1
   1,   2,  27,  28,  29,  30,  31,  32, 181, 182, 183, 184
*Elset, elset=Set-9, instance=Frame-1
   7,  20,  88,  91, 100, 354, 355, 357, 425, 530
*Nset, nset=left, instance=Frame-1
  15,  21,  22,  28, 137, 138, 139, 140, 185, 186, 187, 188
*Elset, elset=left, instance=Frame-1
 290, 311, 313, 315, 354, 359, 396, 399, 434, 436
*Nset, nset=right, instance=Frame-1
   1,   7,   8,  14,  73,  74,  75,  76, 105, 106, 107, 108
*Elset, elset=right, instance=Frame-1
  22,  59,  60,  62,  63,  86,  88,  89, 143, 165
*Nset, nset=s_Set-3, instance=Frame-1, generate
   1,  622,    1
*Elset, elset=s_Set-3, instance=Frame-1, generate
   1,  532,    1
*Nset, nset=toplane, instance=planetop-1, generate
   1,  203,    1
*Elset, elset=toplane, instance=planetop-1, generate
   1,  202,    1
*Elset, elset=_m_Surf-1_SNEG, internal, instance=plane-1, generate
   1,  202,    1
*Surface, type=ELEMENT, name=m_Surf-1
_m_Surf-1_SNEG, SNEG
*Elset, elset=_m_Surf-2_SPOS, internal, instance=planetop-1, generate
   1,  202,    1
*Surface, type=ELEMENT, name=m_Surf-2
_m_Surf-2_SPOS, SPOS
*Surface, type=NODE, name=s_Set-3_CNS_, internal
s_Set-3, 1.
*End Assembly
**
** MATERIALS
**
*Material, name=Rigidbody
*Elastic
 2e+07,
*Material, name=Steel
*Elastic
200000., 0.3
**
** INTERACTION PROPERTIES
**
*Surface Interaction, name=IntProp-1
1.,
*Surface Behavior, pressure-overclosure=HARD
**
** CONTACT INITIALIZATION DATA
**
*Contact Initialization Data, name=CInit-1
**
** INTERACTIONS
**
** Interaction: Int-1
*Contact Pair, interaction=IntProp-1, adjust=Set-8, tied
s_Set-3_CNS_, m_Surf-1
** Interaction: Int-2
*Contact Pair, interaction=IntProp-1, adjust=Set-9, tied
s_Set-3_CNS_, m_Surf-2
** ----------------------------------------------------------------
**
** STEP: Apply load
**
*Step, name="Apply load", nlgeom=NO, inc=10000
Description
*Static
0.01, 50., 2e-05, 0.025
**
** BOUNDARY CONDITIONS
**
** Name: BC-1 Type: Symmetry/Antisymmetry/Encastre
*Boundary
left, XSYMM
** Name: BC-2 Type: Symmetry/Antisymmetry/Encastre
*Boundary
right, XSYMM
** Name: BC-3 Type: Velocity/Angular velocity
*Boundary, type=VELOCITY
toplane, 2, 2, -10.
** Name: BC-4 Type: Displacement/Rotation
*Boundary
Set-5, 1, 1
Set-5, 2, 2
Set-5, 6, 6
**
** OUTPUT REQUESTS
**
*Restart, write, frequency=0
**
** FIELD OUTPUT: F-Output-1
**
*Output, field, variable=PRESELECT, frequency=100
**
** HISTORY OUTPUT: H-Output-1
**
*Output, history, variable=PRESELECT, frequency=100
*End Step
